// SBML level 2 version 4
// Created by JWS2SBML on 2013/02/06 11:09:52

model ssolfGluconeogenesis20132219145263107420132695058784885()

  // Compartments:
  compartment compartment = 1;

  // Species:
  species P3G in compartment = 5; P3G is "3-phospho-D-glycericacid";  // kegg.compound:C00197
  species $ATP in compartment = 9.981;
  species bisP in compartment = 0;
  species $ADP in compartment = 0.019;
  species $nadph in compartment = 0.2;
  species gap in compartment = 0;
  species $nadp in compartment = 0;
  species $pi in compartment = 0;
  species dhap in compartment = 0;
  species f6p in compartment = 0;
  species $sink in compartment = 0;
  species $sink2 in compartment = 0;
  species $sink3 in compartment = 0;

  // Parameters:
  KaldDHAP = 0.0356267;
  KaldF6P = 1;
  KaldGAP = 0.02082299;
  KbisP = 0.0003613911;
  kdbpg = 1.05824;
  kddhap = 0.0225;
  kdgap = 0.0559;
  Kgap = 1.635415;
  KiADP = 3.934568;
  Knadp = 0.2928658;
  Knadph = 0.0558557;
  KpgkADP = 0.03211917;
  KpgkATP = 13.35768;
  KpgkbisP = 5.59;
  KpgkP3G = 0.7036726;
  Kpi = 323.9938;
  KtimDHAP = 0.5188885;
  KtimGAP = 0.4984151;
  KtimPEP = 0.8486859;
  n = 1.646822;
  pep = 2;
  protALDPase = 0.0034;
  protGAPdh = 0.0394;
  protPGK = 0.0068;
  protTIM = 0.0008;
  Vmarev = 19.59583;
  VmfALD = 2.440029;
  Vmfor = 17.70492;
  VmfPGK = 13.52681;
  VmfTIM = 250.3072;
  VmrPGK = 17.51083;
  VmrTIM = 227.3351;
  EXTERNAL = 0;

  // Reactions:
  v1: P3G + $ATP -> bisP + $ADP; protPGK*(-(ADP*VmrPGK*bisP/(KpgkADP*KpgkbisP)) + ATP*VmfPGK*P3G/(KpgkATP*KpgkP3G))/(1 + (1 + ADP/KiADP + ADP*(1 + ADP/KiADP)/KpgkADP + ATP/KpgkATP)*bisP/KpgkbisP + (1 + ADP/KiADP + ATP/KpgkATP)*P3G/KpgkP3G); v1 is "ATP:3-phospho-D-glycerate1-phosphotransferase";  // kegg.reaction:R01512
  v2: bisP + $nadph -> gap + $nadp + $pi; protGAPdh*(bisP/KbisP + pi*gap/(Kgap*Kpi))^(-1 + n)*(nadph*Vmfor*bisP/(KbisP*Knadph) - nadp*pi*Vmarev*gap/(Kgap*Knadp*Kpi))/((1 + nadp/Knadp + nadph/Knadph)*(1 - 2*(bisP/KbisP)^n + (pi/Kpi + bisP/KbisP)^n + (bisP/KbisP + gap/Kgap)^n + (bisP/KbisP + pi*gap/(Kgap*Kpi))^n)); v2 is "D-glyceraldehyde-3-phosphate:NADP+oxidoreductase(phosphorylating)";  // kegg.reaction:R01063
  v3: gap -> dhap; protTIM*(-(VmrTIM*dhap/KtimDHAP) + VmfTIM*gap/KtimGAP)/(1 + pep/KtimPEP + dhap/KtimDHAP + gap/KtimGAP); v3 is "D-glyceraldehyde-3-phosphatealdose-ketose-isomerase";  // kegg.reaction:R01015
  v4: dhap + gap -> f6p; protALDPase*VmfALD*dhap*gap/(KaldDHAP*KaldGAP*(1 + dhap/KaldDHAP + f6p/KaldF6P + gap/KaldGAP + dhap*gap/(KaldDHAP*KaldGAP)));
  v5: gap -> $sink; kdgap*gap;
  v6: dhap -> $sink2; kddhap*dhap;
  v7: bisP -> $sink3; kdbpg*bisP;
end
