// SBML level 2 version 1
// Created by JWS2SBML on 2008/05/26 09:12:12

model teusink()

  // Compartments:
  compartment compartment = 1;

  // Species:
  species Prb in compartment = 0.087;
  species GLCi in compartment = 0.087;
  species Prb in compartment = 5;
  species G6P in compartment = 1.39;
  species F6P in compartment = 0.28;
  species $Glyc in compartment = 0;
  species $Trh in compartment = 0;
  species F16P in compartment = 0.1;
  species TRIO in compartment = 5.17;
  species NAD in compartment = 1.2;
  species BPG in compartment = 0;
  species NADH in compartment = 0.39;
  species P3G in compartment = 0.1;
  species P2G in compartment = 0.1;
  species PEP in compartment = 0.1;
  species PYR in compartment = 3.36;
  species $CO2 in compartment = 1;
  species ACE in compartment = 0.04;
  species $SUCC in compartment = 0;
  species $GLCo in compartment = 50;
  species $ETOH in compartment = 50;
  species $GLY in compartment = 0.15;
  species $X in compartment = 0;

  // Parameters:
  VmGLT = 97.264;
  KeqGLT = 1;
  KmGLTGLCo = 1.1918;
  KmGLTGLCi = 1.1918;
  VmGLK = 226.452;
  KeqGLK = 3800;
  KmGLKGLCi = 0.08;
  KmGLKG6P = 30;
  KmGLKATP = 0.15;
  KmGLKADP = 0.23;
  VmPGI = 339.677;
  KeqPGI = 0.314;
  KmPGIG6P = 1.4;
  KmPGIF6P = 0.3;
  VmPFK = 182.903;
  gR = 5.12;
  L0 = 0.66;
  KmPFKF6P = 0.1;
  CPFKF6P = 0;
  KmPFKATP = 0.71;
  CPFKATP = 3;
  KPFKAMP = 0.0995;
  CPFKAMP = 0.0845;
  KiPFKATP = 0.65;
  CiPFKATP = 100;
  KPFKF26BP = 0.000682;
  CPFKF26BP = 0.0174;
  KPFKF16BP = 0.111;
  CPFKF16BP = 0.397;
  VmALD = 322.258;
  KeqALD = 0.069;
  KmALDF16P = 0.3;
  KmALDGAP = 2;
  KmALDDHAP = 2.4;
  KmALDGAPi = 10;
  VmGAPDHf = 1184.52;
  VmGAPDHr = 6549.68;
  KmGAPDHGAP = 0.21;
  KmGAPDHBPG = 0.0098;
  KmGAPDHNAD = 0.09;
  KmGAPDHNADH = 0.06;
  VmG3PDH = 70.15;
  KeqG3PDH = 4300;
  KmG3PDHDHAP = 0.4;
  KmG3PDHNADH = 0.023;
  KmG3PDHNAD = 0.93;
  KmG3PDHGLY = 1;
  VmPGK = 1306.45;
  KeqPGK = 3200;
  KmPGKBPG = 0.003;
  KmPGKP3G = 0.53;
  KmPGKADP = 0.2;
  KmPGKATP = 0.3;
  VmPGM = 2525.81;
  KeqPGM = 0.19;
  KmPGMP3G = 1.2;
  KmPGMP2G = 0.08;
  VmENO = 365.806;
  KeqENO = 6.7;
  KmENOP2G = 0.04;
  KmENOPEP = 0.5;
  VmPYK = 1088.71;
  KeqPYK = 6500;
  KmPYKPEP = 0.14;
  KmPYKPYR = 21;
  KmPYKADP = 0.53;
  KmPYKATP = 1.5;
  VmPDC = 174.194;
  KmPDCPYR = 4.33;
  nPDC = 1.9;
  VmADH = 810;
  KeqADH = 6.9e-5;
  KmADHACE = 1.11;
  KmADHETOH = 17;
  KmADHNADH = 0.11;
  KmADHNAD = 0.17;
  KiADHACE = 1.1;
  KiADHETOH = 90;
  KiADHNADH = 0.031;
  KiADHNAD = 0.92;
  KATPASE = 39.5;
  KGLYCOGEN = 6;
  KTREHALOSE = 2.4;
  KSUCC = 21.4;
  F26BP = 0.02;
  SUMAXP = 4.1;
  KeqAK = 0.45;
  KeqTPI = 0.045;

  // Reactions:
  vGLK: GLCi + Prb -> G6P; VmGLK*(-(G6P*(SUMAXP - (SUMAXP^2 - 2*SUMAXP*Prb + 8*KeqAK*SUMAXP*Prb + Prb^2 - 4*KeqAK*Prb^2)^0.5)/((1 - 4*KeqAK)*KeqGLK)) + GLCi*(-SUMAXP + Prb - 4*KeqAK*Prb + (SUMAXP^2 - 2*SUMAXP*Prb + 8*KeqAK*SUMAXP*Prb + Prb^2 - 4*KeqAK*Prb^2)^0.5)/(2 - 8*KeqAK))/(KmGLKATP*KmGLKGLCi*(1 + G6P/KmGLKG6P + GLCi/KmGLKGLCi)*(1 + (SUMAXP - (SUMAXP^2 - 2*SUMAXP*Prb + 8*KeqAK*SUMAXP*Prb + Prb^2 - 4*KeqAK*Prb^2)^0.5)/((1 - 4*KeqAK)*KmGLKADP) + (-SUMAXP + Prb - 4*KeqAK*Prb + (SUMAXP^2 - 2*SUMAXP*Prb + 8*KeqAK*SUMAXP*Prb + Prb^2 - 4*KeqAK*Prb^2)^0.5)/((2 - 8*KeqAK)*KmGLKATP)));
  vPGI: G6P -> F6P; VmPGI/KmPGIG6P*(G6P - F6P/KeqPGI)/(1 + G6P/KmPGIG6P + F6P/KmPGIF6P);
  vGLYCO: G6P + Prb -> $Glyc; KGLYCOGEN;
  vTreha: 2 G6P + Prb -> $Trh; KTREHALOSE;
  vPFK: F6P + Prb -> F16P; gR*VmPFK*F6P*(-SUMAXP + Prb - 4*KeqAK*Prb + (SUMAXP^2 - 2*SUMAXP*Prb + 8*KeqAK*SUMAXP*Prb + Prb^2 - 4*KeqAK*Prb^2)^0.5)*(1 + F6P/KmPFKF6P + (-SUMAXP + Prb - 4*KeqAK*Prb + (SUMAXP^2 - 2*SUMAXP*Prb + 8*KeqAK*SUMAXP*Prb + Prb^2 - 4*KeqAK*Prb^2)^0.5)/((2 - 8*KeqAK)*KmPFKATP) + gR*F6P*(-SUMAXP + Prb - 4*KeqAK*Prb + (SUMAXP^2 - 2*SUMAXP*Prb + 8*KeqAK*SUMAXP*Prb + Prb^2 - 4*KeqAK*Prb^2)^0.5)/((2 - 8*KeqAK)*KmPFKATP*KmPFKF6P))/((2 - 8*KeqAK)*KmPFKATP*KmPFKF6P*(L0*(1 + CPFKF26BP*F26BP/KPFKF26BP + CPFKF16BP*F16P/KPFKF16BP)^2*(1 + 2*CPFKAMP*KeqAK*(SUMAXP - (SUMAXP^2 - 2*SUMAXP*Prb + 8*KeqAK*SUMAXP*Prb + Prb^2 - 4*KeqAK*Prb^2)^0.5)^2/((-1 + 4*KeqAK)*KPFKAMP*(SUMAXP - Prb + 4*KeqAK*Prb - (SUMAXP^2 - 2*SUMAXP*Prb + 8*KeqAK*SUMAXP*Prb + Prb^2 - 4*KeqAK*Prb^2)^0.5)))^2*(1 + CiPFKATP*(-SUMAXP + Prb - 4*KeqAK*Prb + (SUMAXP^2 - 2*SUMAXP*Prb + 8*KeqAK*SUMAXP*Prb + Prb^2 - 4*KeqAK*Prb^2)^0.5)/((2 - 8*KeqAK)*KiPFKATP))^2*(1 + CPFKATP*(-SUMAXP + Prb - 4*KeqAK*Prb + (SUMAXP^2 - 2*SUMAXP*Prb + 8*KeqAK*SUMAXP*Prb + Prb^2 - 4*KeqAK*Prb^2)^0.5)/((2 - 8*KeqAK)*KmPFKATP))^2/((1 + F26BP/KPFKF26BP + F16P/KPFKF16BP)^2*(1 + 2*KeqAK*(SUMAXP - (SUMAXP^2 - 2*SUMAXP*Prb + 8*KeqAK*SUMAXP*Prb + Prb^2 - 4*KeqAK*Prb^2)^0.5)^2/((-1 + 4*KeqAK)*KPFKAMP*(SUMAXP - Prb + 4*KeqAK*Prb - (SUMAXP^2 - 2*SUMAXP*Prb + 8*KeqAK*SUMAXP*Prb + Prb^2 - 4*KeqAK*Prb^2)^0.5)))^2*(1 + (-SUMAXP + Prb - 4*KeqAK*Prb + (SUMAXP^2 - 2*SUMAXP*Prb + 8*KeqAK*SUMAXP*Prb + Prb^2 - 4*KeqAK*Prb^2)^0.5)/((2 - 8*KeqAK)*KiPFKATP))^2) + (1 + F6P/KmPFKF6P + (-SUMAXP + Prb - 4*KeqAK*Prb + (SUMAXP^2 - 2*SUMAXP*Prb + 8*KeqAK*SUMAXP*Prb + Prb^2 - 4*KeqAK*Prb^2)^0.5)/((2 - 8*KeqAK)*KmPFKATP) + gR*F6P*(-SUMAXP + Prb - 4*KeqAK*Prb + (SUMAXP^2 - 2*SUMAXP*Prb + 8*KeqAK*SUMAXP*Prb + Prb^2 - 4*KeqAK*Prb^2)^0.5)/((2 - 8*KeqAK)*KmPFKATP*KmPFKF6P))^2));
  vALD: F16P -> 2 TRIO; VmALD*(F16P - KeqTPI*TRIO^2/(KeqALD*(1 + KeqTPI)^2))/(KmALDF16P*(1 + F16P/KmALDF16P + TRIO/((1 + KeqTPI)*KmALDDHAP) + KeqTPI*TRIO/((1 + KeqTPI)*KmALDGAP) + KeqTPI*F16P*TRIO/((1 + KeqTPI)*KmALDF16P*KmALDGAPi) + KeqTPI*TRIO^2/((1 + KeqTPI)^2*KmALDDHAP*KmALDGAP)));
  vGAPDH: TRIO + NAD -> BPG + NADH; (-(VmGAPDHr*BPG*NADH/(KmGAPDHBPG*KmGAPDHNADH)) + KeqTPI*VmGAPDHf*NAD*TRIO/((1 + KeqTPI)*KmGAPDHGAP*KmGAPDHNAD))/((1 + NAD/KmGAPDHNAD + NADH/KmGAPDHNADH)*(1 + BPG/KmGAPDHBPG + KeqTPI*TRIO/((1 + KeqTPI)*KmGAPDHGAP)));
  vPGK: BPG -> P3G + Prb; VmPGK*(KeqPGK*BPG*(SUMAXP - (SUMAXP^2 - 2*SUMAXP*Prb + 8*KeqAK*SUMAXP*Prb + Prb^2 - 4*KeqAK*Prb^2)^0.5)/(1 - 4*KeqAK) - (-SUMAXP + Prb - 4*KeqAK*Prb + (SUMAXP^2 - 2*SUMAXP*Prb + 8*KeqAK*SUMAXP*Prb + Prb^2 - 4*KeqAK*Prb^2)^0.5)*P3G/(2 - 8*KeqAK))/(KmPGKATP*KmPGKP3G*(1 + (SUMAXP - (SUMAXP^2 - 2*SUMAXP*Prb + 8*KeqAK*SUMAXP*Prb + Prb^2 - 4*KeqAK*Prb^2)^0.5)/((1 - 4*KeqAK)*KmPGKADP) + (-SUMAXP + Prb - 4*KeqAK*Prb + (SUMAXP^2 - 2*SUMAXP*Prb + 8*KeqAK*SUMAXP*Prb + Prb^2 - 4*KeqAK*Prb^2)^0.5)/((2 - 8*KeqAK)*KmPGKATP))*(1 + BPG/KmPGKBPG + P3G/KmPGKP3G));
  vPGM: P3G -> P2G; VmPGM/KmPGMP3G*(P3G - P2G/KeqPGM)/(1 + P3G/KmPGMP3G + P2G/KmPGMP2G);
  vENO: P2G -> PEP; VmENO/KmENOP2G*(P2G - PEP/KeqENO)/(1 + P2G/KmENOP2G + PEP/KmENOPEP);
  vPYK: PEP -> PYR + Prb; VmPYK/(KmPYKPEP*KmPYKADP)*(PEP*(SUMAXP - (Prb^2 - 4*KeqAK*Prb^2 - 2*Prb*SUMAXP + 8*KeqAK*Prb*SUMAXP + SUMAXP^2)^0.5)/(1 - 4*KeqAK) - PYR*((Prb - 4*KeqAK*Prb - SUMAXP + (Prb^2 - 4*KeqAK*Prb^2 - 2*Prb*SUMAXP + 8*KeqAK*Prb*SUMAXP + SUMAXP^2)^0.5)/(2 - 8*KeqAK))/KeqPYK)/((1 + PEP/KmPYKPEP + PYR/KmPYKPYR)*(1 + (Prb - 4*KeqAK*Prb - SUMAXP + (Prb^2 - 4*KeqAK*Prb^2 - 2*Prb*SUMAXP + 8*KeqAK*Prb*SUMAXP + SUMAXP^2)^0.5)/(2 - 8*KeqAK)/KmPYKATP + (SUMAXP - (Prb^2 - 4*KeqAK*Prb^2 - 2*Prb*SUMAXP + 8*KeqAK*Prb*SUMAXP + SUMAXP^2)^0.5)/(1 - 4*KeqAK)/KmPYKADP));
  vPDC: PYR -> $CO2 + ACE; VmPDC*(PYR^nPDC/KmPDCPYR^nPDC)/(1 + PYR^nPDC/KmPDCPYR^nPDC);
  vSUC: 2 ACE + 3 NAD -> $SUCC + 3 NADH; KSUCC*ACE;
  vGLT: $GLCo -> GLCi; VmGLT*(GLCo - GLCi/KeqGLT)/(KmGLTGLCo*(1 + GLCo/KmGLTGLCo + GLCi/KmGLTGLCi + 0.91*GLCo*GLCi/(KmGLTGLCi*KmGLTGLCo)));
  vADH: ACE + NADH -> NAD + $ETOH; -(VmADH/(KiADHNAD*KmADHETOH)*(NAD*ETOH - NADH*ACE/KeqADH)/(1 + NAD/KiADHNAD + KmADHNAD*ETOH/(KiADHNAD*KmADHETOH) + KmADHNADH*ACE/(KiADHNADH*KmADHACE) + NADH/KiADHNADH + NAD*ETOH/(KiADHNAD*KmADHETOH) + KmADHNADH*NAD*ACE/(KiADHNAD*KiADHNADH*KmADHACE) + KmADHNAD*ETOH*NADH/(KiADHNAD*KmADHETOH*KiADHNADH) + NADH*ACE/(KiADHNADH*KmADHACE) + NAD*ETOH*ACE/(KiADHNAD*KmADHETOH*KiADHACE) + ETOH*NADH*ACE/(KiADHETOH*KiADHNADH*KmADHACE)));
  vG3PDH: TRIO + NADH -> NAD + $GLY; VmG3PDH*(-(GLY*NAD/KeqG3PDH) + NADH*TRIO/(1 + KeqTPI))/(KmG3PDHDHAP*KmG3PDHNADH*(1 + NAD/KmG3PDHNAD + NADH/KmG3PDHNADH)*(1 + GLY/KmG3PDHGLY + TRIO/((1 + KeqTPI)*KmG3PDHDHAP)));
  vATP: Prb -> $X; KATPASE*((Prb - 4*KeqAK*Prb - SUMAXP + (Prb^2 - 4*KeqAK*Prb^2 - 2*Prb*SUMAXP + 8*KeqAK*Prb*SUMAXP + SUMAXP^2)^0.5)/(2 - 8*KeqAK));
end
