// SBML level 2 version 1
// Created with PySCeS (0.1.5) on Tue, 19 Apr 2005 21:39:38 by JS

model cronwright()

  // Compartments:
  compartment compartment = 1;

  // Species:
  species G3P in compartment = 0;
  species $Gly in compartment = 0;
  species $DHAP in compartment = 0.59;

  // Reactions:
  v1: $DHAP -> G3P; Vf1/(K1nadh*K1dhap)*(NADH*DHAP - NAD*G3P/Keq1)/((1 + F16BP/K1f16bp + ATP/K1atp + ADP/K1adp)*(1 + NADH/K1nadh + NAD/K1nad)*(1 + DHAP/K1dhap + G3P/K1g3p));
    Vf1 = 47; K1nadh = 0.023; K1dhap = 0.54; NADH = 1.87; NAD = 1.45; Keq1 = 10000; F16BP = 6.01; K1f16bp = 4.8; ATP = 2.37; K1atp = 0.73; ADP = 2.17; K1adp = 2; K1nad = 0.93; K1g3p = 1.2;
  v2: G3P -> $Gly; V2*G3P/K2g3p/((1 + G3P/K2g3p)*(1 + Phi/K2phi));
    V2 = 53; K2g3p = 3.5; Phi = 1; K2phi = 1;
end
