// SBML level 2 version 4
// Created by JWS2SBML on 2011/01/14 11:39:02

model teusink2011114113745656664()

  // Compartments:
  compartment compartment = 1;

  // Species:
  species GLCi in compartment = 0.087;
  species Prb in compartment = 5;
  species G6P in compartment = 1.39;
  species F6P in compartment = 0.28;
  species $Glyc in compartment = 0;
  species $Trh in compartment = 0;
  species F16P in compartment = 0.1;
  species TRIO in compartment = 5.17;
  species NAD in compartment = 1.2;
  species BPG in compartment = 0;
  species NADH in compartment = 0.39;
  species P3G in compartment = 0.1;
  species P2G in compartment = 0.1;
  species PEP in compartment = 0.1;
  species PYR in compartment = 3.36;
  species ACE in compartment = 0.04;
  species $CO2 in compartment = 1;
  species $SUCC in compartment = 0;
  species $GLCo in compartment = 50;
  species $ETOH in compartment = 50;
  species $GLY in compartment = 0.15;
  species $X in compartment = 0;

  // Parameters:
  CiPFKATP = 100;
  compartment = 1;
  compartment0 = 1;
  compartment0 = 1;
  CPFKAMP = 0.0845;
  CPFKATP = 3;
  CPFKF16BP = 0.397;
  CPFKF26BP = 0.0174;
  CPFKF6P = 0;
  EXTERNAL = 0;
  F26BP = 0.02;
  gR = 5.12;
  KATPASE = 39.5;
  KeqADH = 6.9e-5;
  KeqAK = 0.45;
  KeqALD = 0.069;
  KeqENO = 6.7;
  KeqG3PDH = 4300;
  KeqGLK = 3800;
  KeqGLT = 1;
  KeqPGI = 0.314;
  KeqPGK = 3200;
  KeqPGM = 0.19;
  KeqPYK = 6500;
  KeqTPI = 0.045;
  KGLYCOGEN = 6;
  KiADHACE = 1.1;
  KiADHETOH = 90;
  KiADHNAD = 0.92;
  KiADHNADH = 0.031;
  KiPFKATP = 0.65;
  KmADHACE = 1.11;
  KmADHETOH = 17;
  KmADHNAD = 0.17;
  KmADHNADH = 0.11;
  KmALDDHAP = 2.4;
  KmALDF16P = 0.3;
  KmALDGAP = 2;
  KmALDGAPi = 10;
  KmENOP2G = 0.04;
  KmENOPEP = 0.5;
  KmG3PDHDHAP = 0.4;
  KmG3PDHGLY = 1;
  KmG3PDHNAD = 0.93;
  KmG3PDHNADH = 0.023;
  KmGAPDHBPG = 0.0098;
  KmGAPDHGAP = 0.21;
  KmGAPDHNAD = 0.09;
  KmGAPDHNADH = 0.06;
  KmGLKADP = 0.23;
  KmGLKATP = 0.15;
  KmGLKG6P = 30;
  KmGLKGLCi = 0.08;
  KmGLTGLCi = 1.1918;
  KmGLTGLCo = 1.1918;
  KmPDCPYR = 4.33;
  KmPFKATP = 0.71;
  KmPFKF6P = 0.1;
  KmPGIF6P = 0.3;
  KmPGIG6P = 1.4;
  KmPGKADP = 0.2;
  KmPGKATP = 0.3;
  KmPGKBPG = 0.003;
  KmPGKP3G = 0.53;
  KmPGMP2G = 0.08;
  KmPGMP3G = 1.2;
  KmPYKADP = 0.53;
  KmPYKATP = 1.5;
  KmPYKPEP = 0.14;
  KmPYKPYR = 21;
  KPFKAMP = 0.0995;
  KPFKF16BP = 0.111;
  KPFKF26BP = 0.000682;
  KSUCC = 21.4;
  KTREHALOSE = 2.4;
  L0 = 0.66;
  nPDC = 1.9;
  SUMAXP = 4.1;
  VmADH = 810;
  VmALD = 322.258;
  VmENO = 365.806;
  VmG3PDH = 70.15;
  VmGAPDHf = 1184.52;
  VmGAPDHr = 6549.68;
  VmGLK = 226.452;
  VmGLT = 97.264;
  VmPDC = 174.194;
  VmPFK = 182.903;
  VmPGI = 339.677;
  VmPGK = 1306.45;
  VmPGM = 2525.81;
  VmPYK = 1088.71;

  // Reactions:
  _1: GLCi + Prb -> G6P; VmGLK*(-(G6P*(SUMAXP - (SUMAXP^2 - 2*SUMAXP*Prb + 8*KeqAK*SUMAXP*Prb + Prb^2 - 4*KeqAK*Prb^2)^0.5)/((1 - 4*KeqAK)*KeqGLK)) + GLCi*(-SUMAXP + Prb - 4*KeqAK*Prb + (SUMAXP^2 - 2*SUMAXP*Prb + 8*KeqAK*SUMAXP*Prb + Prb^2 - 4*KeqAK*Prb^2)^0.5)/(2 - 8*KeqAK))/(KmGLKATP*KmGLKGLCi*(1 + G6P/KmGLKG6P + GLCi/KmGLKGLCi)*(1 + (SUMAXP - (SUMAXP^2 - 2*SUMAXP*Prb + 8*KeqAK*SUMAXP*Prb + Prb^2 - 4*KeqAK*Prb^2)^0.5)/((1 - 4*KeqAK)*KmGLKADP) + (-SUMAXP + Prb - 4*KeqAK*Prb + (SUMAXP^2 - 2*SUMAXP*Prb + 8*KeqAK*SUMAXP*Prb + Prb^2 - 4*KeqAK*Prb^2)^0.5)/((2 - 8*KeqAK)*KmGLKATP))); _1 is "v1";
  _2: G6P -> F6P; VmPGI*(-(F6P/KeqPGI) + G6P)/(KmPGIG6P*(1 + F6P/KmPGIF6P + G6P/KmPGIG6P)); _2 is "v2";
  _3: G6P + Prb -> $Glyc; KGLYCOGEN; _3 is "v3";
  _4: Prb + 2 G6P -> $Trh; KTREHALOSE; _4 is "v4";
  _5: F6P + Prb -> F16P; gR*VmPFK*F6P*(-SUMAXP + Prb - 4*KeqAK*Prb + (SUMAXP^2 - 2*SUMAXP*Prb + 8*KeqAK*SUMAXP*Prb + Prb^2 - 4*KeqAK*Prb^2)^0.5)*(1 + F6P/KmPFKF6P + (-SUMAXP + Prb - 4*KeqAK*Prb + (SUMAXP^2 - 2*SUMAXP*Prb + 8*KeqAK*SUMAXP*Prb + Prb^2 - 4*KeqAK*Prb^2)^0.5)/((2 - 8*KeqAK)*KmPFKATP) + gR*F6P*(-SUMAXP + Prb - 4*KeqAK*Prb + (SUMAXP^2 - 2*SUMAXP*Prb + 8*KeqAK*SUMAXP*Prb + Prb^2 - 4*KeqAK*Prb^2)^0.5)/((2 - 8*KeqAK)*KmPFKATP*KmPFKF6P))/((2 - 8*KeqAK)*KmPFKATP*KmPFKF6P*(L0*(1 + CPFKF26BP*F26BP/KPFKF26BP + CPFKF16BP*F16P/KPFKF16BP)^2*(1 + 2*CPFKAMP*KeqAK*(SUMAXP - (SUMAXP^2 - 2*SUMAXP*Prb + 8*KeqAK*SUMAXP*Prb + Prb^2 - 4*KeqAK*Prb^2)^0.5)^2/((-1 + 4*KeqAK)*KPFKAMP*(SUMAXP - Prb + 4*KeqAK*Prb - (SUMAXP^2 - 2*SUMAXP*Prb + 8*KeqAK*SUMAXP*Prb + Prb^2 - 4*KeqAK*Prb^2)^0.5)))^2*(1 + CiPFKATP*(-SUMAXP + Prb - 4*KeqAK*Prb + (SUMAXP^2 - 2*SUMAXP*Prb + 8*KeqAK*SUMAXP*Prb + Prb^2 - 4*KeqAK*Prb^2)^0.5)/((2 - 8*KeqAK)*KiPFKATP))^2*(1 + CPFKATP*(-SUMAXP + Prb - 4*KeqAK*Prb + (SUMAXP^2 - 2*SUMAXP*Prb + 8*KeqAK*SUMAXP*Prb + Prb^2 - 4*KeqAK*Prb^2)^0.5)/((2 - 8*KeqAK)*KmPFKATP))^2/((1 + F26BP/KPFKF26BP + F16P/KPFKF16BP)^2*(1 + 2*KeqAK*(SUMAXP - (SUMAXP^2 - 2*SUMAXP*Prb + 8*KeqAK*SUMAXP*Prb + Prb^2 - 4*KeqAK*Prb^2)^0.5)^2/((-1 + 4*KeqAK)*KPFKAMP*(SUMAXP - Prb + 4*KeqAK*Prb - (SUMAXP^2 - 2*SUMAXP*Prb + 8*KeqAK*SUMAXP*Prb + Prb^2 - 4*KeqAK*Prb^2)^0.5)))^2*(1 + (-SUMAXP + Prb - 4*KeqAK*Prb + (SUMAXP^2 - 2*SUMAXP*Prb + 8*KeqAK*SUMAXP*Prb + Prb^2 - 4*KeqAK*Prb^2)^0.5)/((2 - 8*KeqAK)*KiPFKATP))^2) + (1 + F6P/KmPFKF6P + (-SUMAXP + Prb - 4*KeqAK*Prb + (SUMAXP^2 - 2*SUMAXP*Prb + 8*KeqAK*SUMAXP*Prb + Prb^2 - 4*KeqAK*Prb^2)^0.5)/((2 - 8*KeqAK)*KmPFKATP) + gR*F6P*(-SUMAXP + Prb - 4*KeqAK*Prb + (SUMAXP^2 - 2*SUMAXP*Prb + 8*KeqAK*SUMAXP*Prb + Prb^2 - 4*KeqAK*Prb^2)^0.5)/((2 - 8*KeqAK)*KmPFKATP*KmPFKF6P))^2)); _5 is "v5";
  _6: F16P -> 2 TRIO; VmALD*(F16P - KeqTPI*TRIO^2/(KeqALD*(1 + KeqTPI)^2))/(KmALDF16P*(1 + F16P/KmALDF16P + TRIO/((1 + KeqTPI)*KmALDDHAP) + KeqTPI*TRIO/((1 + KeqTPI)*KmALDGAP) + KeqTPI*F16P*TRIO/((1 + KeqTPI)*KmALDF16P*KmALDGAPi) + KeqTPI*TRIO^2/((1 + KeqTPI)^2*KmALDDHAP*KmALDGAP))); _6 is "v6";
  _7: NAD + TRIO -> BPG + NADH; (-(VmGAPDHr*BPG*NADH/(KmGAPDHBPG*KmGAPDHNADH)) + KeqTPI*VmGAPDHf*NAD*TRIO/((1 + KeqTPI)*KmGAPDHGAP*KmGAPDHNAD))/((1 + NAD/KmGAPDHNAD + NADH/KmGAPDHNADH)*(1 + BPG/KmGAPDHBPG + KeqTPI*TRIO/((1 + KeqTPI)*KmGAPDHGAP))); _7 is "v7";
  _8: BPG -> P3G + Prb; VmPGK*(KeqPGK*BPG*(SUMAXP - (SUMAXP^2 - 2*SUMAXP*Prb + 8*KeqAK*SUMAXP*Prb + Prb^2 - 4*KeqAK*Prb^2)^0.5)/(1 - 4*KeqAK) - P3G*(-SUMAXP + Prb - 4*KeqAK*Prb + (SUMAXP^2 - 2*SUMAXP*Prb + 8*KeqAK*SUMAXP*Prb + Prb^2 - 4*KeqAK*Prb^2)^0.5)/(2 - 8*KeqAK))/(KmPGKATP*KmPGKP3G*(1 + BPG/KmPGKBPG + P3G/KmPGKP3G)*(1 + (SUMAXP - (SUMAXP^2 - 2*SUMAXP*Prb + 8*KeqAK*SUMAXP*Prb + Prb^2 - 4*KeqAK*Prb^2)^0.5)/((1 - 4*KeqAK)*KmPGKADP) + (-SUMAXP + Prb - 4*KeqAK*Prb + (SUMAXP^2 - 2*SUMAXP*Prb + 8*KeqAK*SUMAXP*Prb + Prb^2 - 4*KeqAK*Prb^2)^0.5)/((2 - 8*KeqAK)*KmPGKATP))); _8 is "v8";
  _9: P3G -> P2G; VmPGM*(-(P2G/KeqPGM) + P3G)/(KmPGMP3G*(1 + P2G/KmPGMP2G + P3G/KmPGMP3G)); _9 is "v9";
  _10: P2G -> PEP; VmENO*(P2G - PEP/KeqENO)/(KmENOP2G*(1 + P2G/KmENOP2G + PEP/KmENOPEP)); _10 is "v10";
  _11: PEP -> Prb + PYR; VmPYK*(PEP*(SUMAXP - (SUMAXP^2 - 2*SUMAXP*Prb + 8*KeqAK*SUMAXP*Prb + Prb^2 - 4*KeqAK*Prb^2)^0.5)/(1 - 4*KeqAK) - (-SUMAXP + Prb - 4*KeqAK*Prb + (SUMAXP^2 - 2*SUMAXP*Prb + 8*KeqAK*SUMAXP*Prb + Prb^2 - 4*KeqAK*Prb^2)^0.5)*PYR/((2 - 8*KeqAK)*KeqPYK))/(KmPYKADP*KmPYKPEP*(1 + (SUMAXP - (SUMAXP^2 - 2*SUMAXP*Prb + 8*KeqAK*SUMAXP*Prb + Prb^2 - 4*KeqAK*Prb^2)^0.5)/((1 - 4*KeqAK)*KmPYKADP) + (-SUMAXP + Prb - 4*KeqAK*Prb + (SUMAXP^2 - 2*SUMAXP*Prb + 8*KeqAK*SUMAXP*Prb + Prb^2 - 4*KeqAK*Prb^2)^0.5)/((2 - 8*KeqAK)*KmPYKATP))*(1 + PEP/KmPYKPEP + PYR/KmPYKPYR)); _11 is "v11";
  _12: PYR -> ACE + $CO2; VmPDC*PYR^nPDC/(KmPDCPYR^nPDC*(1 + PYR^nPDC/KmPDCPYR^nPDC)); _12 is "v12";
  _13: 2 ACE + 3 NAD -> $SUCC + 3 NADH; KSUCC*ACE; _13 is "v13";
  _14: $GLCo -> GLCi; VmGLT*(GLCo - GLCi/KeqGLT)/(KmGLTGLCo*(1 + GLCo/KmGLTGLCo + GLCi/KmGLTGLCi + 0.91*GLCo*GLCi/(KmGLTGLCi*KmGLTGLCo))); _14 is "v14";
  _15: ACE + NADH -> NAD + $ETOH; -(VmADH*(ETOH*NAD - ACE*NADH/KeqADH)/(KiADHNAD*KmADHETOH*(1 + ETOH*KmADHNAD/(KiADHNAD*KmADHETOH) + KmADHNADH*ACE/(KiADHNADH*KmADHACE) + NAD/KiADHNAD + ETOH*NAD/(KiADHNAD*KmADHETOH) + ETOH*ACE*NAD/(KiADHACE*KiADHNAD*KmADHETOH) + KmADHNADH*ACE*NAD/(KiADHNAD*KiADHNADH*KmADHACE) + NADH/KiADHNADH + ETOH*KmADHNAD*NADH/(KiADHNAD*KiADHNADH*KmADHETOH) + ACE*NADH/(KiADHNADH*KmADHACE) + ETOH*ACE*NADH/(KiADHETOH*KiADHNADH*KmADHACE)))); _15 is "v15";
  _16: NADH + TRIO -> NAD + $GLY; VmG3PDH*(-(GLY*NAD/KeqG3PDH) + NADH*TRIO/(1 + KeqTPI))/(KmG3PDHDHAP*KmG3PDHNADH*(1 + NAD/KmG3PDHNAD + NADH/KmG3PDHNADH)*(1 + GLY/KmG3PDHGLY + TRIO/((1 + KeqTPI)*KmG3PDHDHAP))); _16 is "v16";
  _17: Prb -> $X; 0*ACE + 0*BPG + 0*F16P + 0*F6P + 0*G6P + 0*GLCi + 0*NAD + 0*NADH + 0*P2G + 0*P3G + 0*PEP + 0*Prb + KATPASE*(-SUMAXP + Prb - 4*KeqAK*Prb + (SUMAXP^2 - 2*SUMAXP*Prb + 8*KeqAK*SUMAXP*Prb + Prb^2 - 4*KeqAK*Prb^2)^0.5)/(2 - 8*KeqAK) + 0*PYR + 0*TRIO; _17 is "v17";  // modifiers: ACE, BPG, F16P, F6P, G6P, GLCi, NAD, NADH, P2G, P3G, PEP, PYR, TRIO
end
